# OpenSim document version 30000
ScaleTool MoBL_ARMS_module5_scaled:
  mass: 4.433052 [kg]
  height: -1
  age: -1
  ModelScaler:
    apply: true
    scaling_order: measurements
    marker_file: static.trc
    time_range: 7.845 8.525
    preserve_mass_distribution: true
    MeasurementSet:
      Measurement Clavicle: apply=true
        MarkerPair: markers=(R.Shoulder R.Clavicle)
        BodyScale clavicle: axes=(X Y Z)
      Measurement Humerus: apply=true
        MarkerPair: markers=(R.Shoulder R.Elbow.Medial)
        MarkerPair: markers=(R.Shoulder R.Elbow.Lateral)
        BodyScale scapula: axes=(X Y Z)
        BodyScale humerus: axes=(X Y Z)
      Measurement Forearm: apply=true
        MarkerPair: markers=(R.Elbow.Medial R.Radius)
        MarkerPair: markers=(R.Elbow.Lateral R.Ulna)
        BodyScale ulna: axes=(X Y Z)
        BodyScale radius: axes=(X Y Z)
  MarkerPlacer:
    apply: true
    marker_file: static.trc
    time_range: 7.845 8.525
    max_marker_movement: -1
    IKTaskSet:
      IKMarkerTask R.Clavicle: apply=true weight=1
      IKMarkerTask C7: apply=true weight=1
      IKMarkerTask R.Shoulder: apply=true weight=1
      IKMarkerTask R.Bicep: apply=true weight=1
      IKMarkerTask R.Elbow.Lateral: apply=true weight=1
      IKMarkerTask R.Forearm: apply=true weight=1
      IKMarkerTask R.Radius: apply=true weight=1
      IKMarkerTask Handle: apply=true weight=1
      IKMarkerTask R.Elbow.Medial: apply=true weight=1
      IKMarkerTask R.Ulna: apply=true weight=1
